<FDM_CONFIG NAME="f22" VERSION="1.60">
<!--

  File:        f22.xml
  Author:      Erik Hofman
  CVS Version: $Id: f22.xml,v 1.5 2003/03/28 21:26:14 ehofman Exp $

  Function: models a Lockheed-Martin F-22 Raptor
-->

  <METRICS>
    AC_WINGAREA  848.28
    AC_WINGSPAN   44.5
    AC_CHORD      23.0
    AC_HTAILAREA 238.9
    AC_HTAILARM   18.66
    AC_VTAILAREA  79.1
    AC_LV         18.66
    AC_IXX     40843
    AC_IYY    204751
    AC_IZZ    258201
    AC_IXZ         0
    AC_EMPTYWT 29446.93
    AC_AERORP          -427.6    0.0    6.9
    AC_CGLOC           -448.0    0.0    6.2
    AC_EYEPTLOC        -910.0    0.0   85.7
    AC_POINTMASS 230.0 -910.0    0.0   85.7
  </METRICS>

  <UNDERCARRIAGE>
     AC_GEAR  NOSE      -759.8    0.0 -154.1 12200 5000 0.5 0.8 0.02 STEERABLE NOSE 60 RETRACT
     AC_GEAR  MLG_LEFT  -296.3 -135.8 -154.1 22704 9000 0.5 0.8 0.02 FIXED     LEFT  0 RETRACT
     AC_GEAR  MLG_RIGHT -296.3  135.8 -154.1 22704 9000 0.5 0.8 0.02 FIXED     RIGHT 0 RETRACT

     AC_GEAR  WT_LEFT   -242.5 -267.0    0.0 10000 2000 0.2 0.2 0.2  FIXED     NONE  0 FIXED
     AC_GEAR  WT_RIGHT  -242.5  267.0    0.0 10000 2000 0.2 0.2 0.2  FIXED     NONE  0 FIXED
     AC_GEAR  RADOME   -1225.8    0.0  -19.4 10000 2000 0.2 0.2 0.2  FIXED     NONE  0 FIXED
  </UNDERCARRIAGE>

  <PROPULSION>
    <AC_ENGINE FILE="low_bypass_turbofan">
      XLOC    0.0
      YLOC  -52.8
      ZLOC    0.0
      PITCH   0
      YAW     0
      FEED    0
      FEED    1
    </AC_ENGINE>
    <AC_ENGINE FILE="low_bypass_turbofan">
      XLOC    0.0
      YLOC   52.8
      ZLOC    0.0
      PITCH   0
      YAW     0
      FEED    0
      FEED    1
    </AC_ENGINE>
    <AC_THRUSTER FILE="direct">
      XLOC    0.0
      YLOC  -52.8
      ZLOC    0.0
      PITCH   0
      YAW     0
    </AC_THRUSTER>
    <AC_THRUSTER FILE="direct">
      XLOC    0.0
      YLOC   52.8
      ZLOC    0.0
      PITCH   0
      YAW     0
    </AC_THRUSTER>
    <AC_TANK TYPE="FUEL" NUMBER="0">
      XLOC -269.4
      YLOC  282.9
      ZLOC    0.0
      RADIUS
      CAPACITY
      CONTENTS
    </AC_TANK>
    <AC_TANK TYPE="FUEL" NUMBER="1">
      XLOC -269.4
      YLOC -282.9
      ZLOC    0.0
      RADIUS
      CAPACITY
      CONTENTS
    </AC_TANK>
  </PROPULSION>

  <FLIGHT_CONTROL NAME="f22">
   <COMPONENT NAME="Pitch Trim Sum" TYPE="SUMMER">
       INPUT        fcs/elevator-cmd-norm
       INPUT        fcs/pitch-trim-cmd-norm
       CLIPTO       -1 1
    </COMPONENT>
    <COMPONENT NAME="Elevator Control" TYPE="AEROSURFACE_SCALE">
       INPUT         fcs/pitch-trim-sum
       MIN          -25
       MAX           30
       OUTPUT        fcs/elevator-pos-rad
       GAIN          0.73304
     </COMPONENT>
     <COMPONENT NAME="Roll Trim Sum" TYPE="SUMMER">
       INPUT         fcs/aileron-cmd-norm
       INPUT         fcs/roll-trim-cmd-norm
       CLIPTO        -1 1
     </COMPONENT>
     <COMPONENT NAME="Left Aileron Control" TYPE="AEROSURFACE_SCALE">
       INPUT         fcs/roll-trim-sum
       MIN          -25
       MAX           25
       GAIN          1.22173
       OUTPUT        fcs/left-aileron-pos-rad
     </COMPONENT>
      <COMPONENT NAME="Right Aileron Control" TYPE="AEROSURFACE_SCALE">
       INPUT         fcs/roll-trim-sum
       MIN          -25
       MAX           25
       INVERT
       GAIN          1.22173
       OUTPUT        fcs/right-aileron-pos-rad
     </COMPONENT>
     <COMPONENT NAME="Yaw Trim Sum" TYPE="SUMMER">
       INPUT        fcs/rudder-cmd-norm
       INPUT        fcs/yaw-trim-cmd-norm
       CLIPTO       -1 1
     </COMPONENT>
     <COMPONENT NAME="Rudder Control" TYPE="AEROSURFACE_SCALE">
       INPUT        fcs/yaw-trim-sum
       MIN         -30
       MAX          30
       GAIN         0.52360
       OUTPUT       fcs/rudder-pos-rad
     </COMPONENT>
     <COMPONENT NAME="Gear Control" TYPE="KINEMAT">
       INPUT        gear/gear-cmd-norm
       DETENTS      2
                    0    0
                    1    5
       OUTPUT       gear/gear-pos-norm
     </COMPONENT>
  </FLIGHT_CONTROL>

  <AERODYNAMICS>

    AC_ALPHALIMITS -0.0873 1.3963

    <AXIS NAME="LIFT">

     <COEFFICIENT NAME="CLalpha" TYPE="VECTOR">
      Lift_due_to_alpha
      21
      aero/alpha-rad
      aero/qbar-psf | metrics/Sw-sqft
      -0.6109  -1.5000
      -0.5236  -1.3797
      -0.4363  -1.1417
      -0.3491  -0.9038
      -0.2618  -0.6659
      -0.1745  -0.4279
      -0.0873  -0.1900
      0.0000   0.0479
      0.0873   0.2859
      0.1745   0.5238
      0.2618   0.7617
      0.3491   0.9997
      0.4363   1.2376
      0.5236   1.4755
      0.6109   1.7135
      0.6981   1.9514
      0.7854   2.0000
      0.8727   1.7864
      1.0472   1.5484
      1.2217   1.3105
      1.3963   1.0726
     </COEFFICIENT>

     <COEFFICIENT NAME="CLadot" TYPE="VALUE">
      Lift_due_to_alpha_rate
      aero/qbar-psf | metrics/Sw-sqft | aero/alphadot-rad_sec | aero/ci2vel
      2.5602
     </COEFFICIENT>

     <COEFFICIENT NAME="CLq" TYPE="VALUE">
      Lift_due_to_pitch_rate
      aero/qbar-psf | metrics/Sw-sqft | velocities/q-aero-rad_sec | aero/ci2vel
      2.7711
     </COEFFICIENT>

    </AXIS>

    <AXIS NAME="DRAG">

     <COEFFICIENT NAME="CDalpha" TYPE="VALUE">
      Drag_due_to_alpha
      aero/qbar-psf | metrics/Sw-sqft | aero/alpha-rad
      0.1786
     </COEFFICIENT>

     <COEFFICIENT NAME="CDmin" TYPE="VALUE">
      Drag_minimum
      aero/qbar-psf | metrics/Sw-sqft
      0.0101
     </COEFFICIENT>

     <COEFFICIENT NAME="CDgear" TYPE="VALUE">
      Drag_due_to_landing_gear
      aero/qbar-psf | metrics/Sw-sqft | gear/gear-pos-norm
      0.0200
     </COEFFICIENT>

    </AXIS>

    <AXIS NAME="SIDE">

     <COEFFICIENT NAME="CYb" TYPE="VALUE">
      Side_force_due_to_beta
      aero/qbar-psf | metrics/Sw-sqft | aero/beta-rad
      -0.2875
     </COEFFICIENT>

     <COEFFICIENT NAME="CYbdot" TYPE="VALUE">
      Side_force_due_to_beta_rate
      aero/qbar-psf | metrics/Sw-sqft | aero/betadot-rad_sec
      -0.0458
     </COEFFICIENT>

     <COEFFICIENT NAME="CYDr" TYPE="VALUE">
      Side_force_due_to_rudder
      aero/qbar-psf | metrics/Sw-sqft | fcs/rudder-pos-rad
      0.0619
     </COEFFICIENT>

     <COEFFICIENT NAME="CYp" TYPE="VALUE">
      Side_force_due_to_roll_rate
      aero/qbar-psf | metrics/Sw-sqft | aero/bi2vel | velocities/p-aero-rad_sec
      0.0399
     </COEFFICIENT>

     <COEFFICIENT NAME="CYr" TYPE="VALUE">
      Side_force_due_to_yaw_rate
      aero/qbar-psf | metrics/Sw-sqft | aero/bi2vel | velocities/r-aero-rad_sec
      0.1218
     </COEFFICIENT>
    </AXIS>
    <AXIS NAME="ROLL">
     <COEFFICIENT NAME="Clb" TYPE="VECTOR">
      Roll_moment_due_to_beta
      9
      aero/alpha-rad
      aero/qbar-psf | metrics/Sw-sqft | metrics/bw-ft | aero/beta-rad
      -0.0873   0.0339
       0.0      0.0339
       0.0873   0.0197
       0.1745   0.0091
       0.2618   0.0089
       0.3491   0.0054
       0.4363   0.0149
       0.5236   0.0273
       0.6109   0.0021
     </COEFFICIENT>
     <COEFFICIENT NAME="Clbdot" TYPE="VALUE">
      Roll_moment_due_to_beta_rate
      aero/qbar-psf | metrics/Sw-sqft | metrics/bw-ft | aero/ci2vel | aero/betadot-rad_sec
      -0.0037
     </COEFFICIENT>
     <COEFFICIENT NAME="ClDa" TYPE="VALUE">
      Roll_moment_due_to_aileron
      aero/qbar-psf | metrics/Sw-sqft | metrics/bw-ft | fcs/left-aileron-pos-rad
      0.0489
     </COEFFICIENT>
    </AXIS>

    <AXIS NAME="PITCH">
     <COEFFICIENT NAME="Cmalpha" TYPE="VECTOR">
      Pitch_moment_due_to_alpha
      15
      aero/alpha-rad
      aero/qbar-psf | metrics/Sw-sqft | metrics/cbarw-ft
      -0.0873  -0.1597
       0.0     -0.0742
       0.0873   0.0000
       0.1745   0.1198
       0.2618   0.1826
       0.3491   0.2510
       0.4363   0.3423
       0.5236   0.5591
       0.6109   0.6618
       0.6981   0.7816
       0.7854   0.7473
       0.8727   0.6389
       1.0472   0.6389
       1.2217   0.2681
       1.3963  -0.4678
     </COEFFICIENT>
     <COEFFICIENT NAME="Cmadot" TYPE="VALUE">
      Pitch_moment_due_to_alpha_rate
      aero/qbar-psf | metrics/Sw-sqft | metrics/cbarw-ft | aero/ci2vel | aero/alphadot-rad_sec
      -1.5611
     </COEFFICIENT>
     <COEFFICIENT NAME="Cmo" TYPE="VALUE">
      Pitching_moment_at_zero_alpha
      aero/qbar-psf | metrics/Sw-sqft | metrics/cbarw-ft
      0.0603
     </COEFFICIENT>
     <COEFFICIENT NAME="CmDh" TYPE="VALUE">
      Pitch_moment_due_to_alpha_rate_and_horizontal_tail_deflection
      aero/qbar-psf | metrics/Sw-sqft | metrics/cbarw-ft | fcs/elevator-pos-rad
      -0.9016
     </COEFFICIENT>
     <COEFFICIENT NAME="CmadotDh" TYPE="VALUE">
      Pitch_moment_due_to_horizontal_tail_deflection
      aero/qbar-psf | metrics/Sw-sqft | metrics/cbarw-ft | aero/ci2vel | aero/alphadot-rad_sec | fcs/elevator-pos-rad
      -1.5611
     </COEFFICIENT>
     <COEFFICIENT NAME="Cmq" TYPE="VALUE">
      Pitch_moment_due_to_pitch_rate
      aero/qbar-psf | metrics/Sw-sqft | metrics/cbarw-ft | aero/ci2vel | velocities/q-rad_sec
      -1.7830
     </COEFFICIENT>
     <COEFFICIENT NAME="CmqDh" TYPE="VALUE">
      Pitch_moment_due_to_pitch_rate_and_horizontal_tail_deflection
      aero/qbar-psf | metrics/Sw-sqft | metrics/cbarw-ft | aero/ci2vel | velocities/q-rad_sec | fcs/elevator-pos-rad
      -1.1726
     </COEFFICIENT>
    </AXIS>

    <AXIS NAME="YAW">
     <COEFFICIENT NAME="Cnb" TYPE="VECTOR">
      Yaw_moment_due_to_beta
      9
      aero/alpha-rad
      aero/qbar-psf | metrics/Sw-sqft | metrics/bw-ft | aero/beta-rad
      -0.0873  -0.0012
       0.0     -0.0012
       0.0873  -0.0014
       0.1745  -0.0019
       0.2618  -0.0022
       0.3491  -0.0015
       0.4363  -0.0024
       0.5236  -0.0012
       0.6109  -0.0017
     </COEFFICIENT>
     <COEFFICIENT NAME="Cnbdot" TYPE="VALUE">
      Yaw_moment_due_to_beta_rate
      aero/qbar-psf | metrics/Sw-sqft | metrics/bw-ft | aero/ci2vel | aero/betadot-rad_sec
      -0.0115
     </COEFFICIENT>
     <COEFFICIENT NAME="CnDr" TYPE="VECTOR">
      Yaw_moment_due_to_rudder
      9
      aero/alpha-rad
      aero/qbar-psf | metrics/Sw-sqft | metrics/bw-ft | fcs/rudder-pos-rad
      -0.0873  -0.0327
       0.0     -0.0342
       0.0873  -0.0354
       0.1745  -0.0357
       0.2618  -0.0321
       0.3491  -0.0237
       0.4363  -0.0179
       0.5236  -0.0100
       0.6109  -0.0038
     </COEFFICIENT>
     <COEFFICIENT NAME="Cnp" TYPE="VALUE">
      Yaw_moment_due_to_roll_rate
      aero/qbar-psf | metrics/Sw-sqft | metrics/bw-ft | aero/bi2vel | velocities/p-rad_sec
      -0.0035
     </COEFFICIENT>
    </AXIS>

  </AERODYNAMICS>

  <OUTPUT NAME="f22.cvs" TYPE="NONE">
    RATE_IN_HZ       10
    SIMULATION       OFF
    ATMOSPHERE       ON
    MASSPROPS        ON
    AEROSURFACES     ON
    RATES            ON
    VELOCITIES       ON
    FORCES           ON
    MOMENTS          ON
    POSITION         ON
    COEFFICIENTS     ON
    GROUND_REACTIONS ON
    FCS              ON
    PROPULSION       ON
  </OUTPUT>
</FDM_CONFIG>
